// SBML level 3 version 1

model biocomputer_tube_design()
  // Biocomputer with NUPACK tube_design

  // Compartments:
  compartment c1 = 1e-6 litre;

  // Species:
  species miR21 in c1 = 1e-6;
  species miR155 in c1 = 1e-6;
  species miR34 in c1 = 0;
  species Gate21 in c1 = 5e-6;
  species Gate155 in c1 = 5e-6;
  species Gate34 in c1 = 1e-6;
  species Reporter in c1 = 1e-6;
  species Int21 in c1 = 0;
  species Int155 in c1 = 0;
  species Output in c1 = 0;
  species Signal in c1 = 0;
  species Reporter_Inhibited in c1 = 0;
  species Crosstalk_21_155 in c1 = 0;
  species Crosstalk_21_34 in c1 = 0;
  species Crosstalk_155_21 in c1 = 0;
  species Crosstalk_155_34 in c1 = 0;
  species Crosstalk_34_21 in c1 = 0;
  species Crosstalk_34_155 in c1 = 0;

  // Parameters:
  k_on_bind21 = 168134.8;
  k_off_bind21 = 3.567354e-14;
  k_on_bind155 = 1000000;
  k_off_bind155 = 3.392647e-20;
  k_and = 100000;
  k_cat_report = 0.1;
  k_inhibit = 1000000;
  k_uninhibit = 0.001;
  k_leak_gate21 = 1e-5;
  k_cross_21_155 = 168134.8;
  k_uncross_21_155 = 0.1084686;
  k_cross_21_34 = 168134.8;
  k_uncross_21_34 = 345.3053;
  k_cross_155_21 = 1000000;
  k_uncross_155_21 = 1.722282;
  k_cross_155_34 = 1000000;
  k_uncross_155_34 = 712.0874;
  k_cross_34_21 = 956.4133;
  k_uncross_34_21 = 95.23964;
  k_cross_34_155 = 956.4133;
  k_uncross_34_155 = 0.7293;
  k_deg_Int21 = 0.001;
  k_deg_Int155 = 0.001;
  k_deg_Output = 0.001;
  k_deg_Signal = 0.001;
  k_deg_miR21 = 0.001;
  k_deg_miR155 = 0.001;
  k_deg_miR34 = 0.001;
  k_deg_Reporter = 0.001;
  k_deg_Reporter_Inhibited = 0.001;
  k_deg_Gate21 = 0.001;
  k_deg_Gate155 = 0.001;
  k_deg_Gate34 = 0.001;
  k_on_bind34 = 956.4133;
  k_off_bind34 = 1.975358e-11;

  // Reactions:
  bind21: Gate21 + miR21 => Int21; k_on_bind21*Gate21*miR21;
  unbind21: Int21 => Gate21 + miR21; k_off_bind21*Int21;
  bind155: Gate155 + miR155 => Int155; k_on_bind155*Gate155*miR155;
  unbind155: Int155 => Gate155 + miR155; k_off_bind155*Int155;
  cross_bind_Crosstalk_21_155: miR21 + Gate155 => Crosstalk_21_155; k_cross_21_155*miR21*Gate155;
  cross_unbind_Crosstalk_21_155: Crosstalk_21_155 => miR21 + Gate155; k_uncross_21_155*Crosstalk_21_155;
  cross_bind_Crosstalk_21_34: miR21 + Gate34 => Crosstalk_21_34; k_cross_21_34*miR21*Gate34;
  cross_unbind_Crosstalk_21_34: Crosstalk_21_34 => miR21 + Gate34; k_uncross_21_34*Crosstalk_21_34;
  cross_bind_Crosstalk_155_21: miR155 + Gate21 => Crosstalk_155_21; k_cross_155_21*miR155*Gate21;
  cross_unbind_Crosstalk_155_21: Crosstalk_155_21 => miR155 + Gate21; k_uncross_155_21*Crosstalk_155_21;
  cross_bind_Crosstalk_155_34: miR155 + Gate34 => Crosstalk_155_34; k_cross_155_34*miR155*Gate34;
  cross_unbind_Crosstalk_155_34: Crosstalk_155_34 => miR155 + Gate34; k_uncross_155_34*Crosstalk_155_34;
  cross_bind_Crosstalk_34_21: miR34 + Gate21 => Crosstalk_34_21; k_cross_34_21*miR34*Gate21;
  cross_unbind_Crosstalk_34_21: Crosstalk_34_21 => miR34 + Gate21; k_uncross_34_21*Crosstalk_34_21;
  cross_bind_Crosstalk_34_155: miR34 + Gate155 => Crosstalk_34_155; k_cross_34_155*miR34*Gate155;
  cross_unbind_Crosstalk_34_155: Crosstalk_34_155 => miR34 + Gate155; k_uncross_34_155*Crosstalk_34_155;
  and_generate_output: Int21 + Int155 => Output; k_and*Int21*Int155;
  reporter_activate: Output + Reporter => Signal; k_cat_report*Output*Reporter;
  inhibit_reporter: miR34 + Reporter => Reporter_Inhibited; k_inhibit*miR34*Reporter;
  uninhibit_reporter: Reporter_Inhibited => miR34 + Reporter; k_uninhibit*Reporter_Inhibited;
  leak_gate21: Gate21 => Output; k_leak_gate21*Gate21;
  deg_Int21: Int21 => ; k_deg_Int21*Int21;
  deg_Int155: Int155 => ; k_deg_Int155*Int155;
  deg_Output: Output => ; k_deg_Output*Output;
  deg_Signal: Signal => ; k_deg_Signal*Signal;
  deg_miR21: miR21 => ; k_deg_miR21*miR21;
  deg_miR155: miR155 => ; k_deg_miR155*miR155;
  deg_miR34: miR34 => ; k_deg_miR34*miR34;
  deg_Reporter: Reporter => ; k_deg_Reporter*Reporter;
  deg_Reporter_Inhibited: Reporter_Inhibited => ; k_deg_Reporter_Inhibited*Reporter_Inhibited;
  deg_Gate21: Gate21 => ; k_deg_Gate21*Gate21;
  deg_Gate155: Gate155 => ; k_deg_Gate155*Gate155;
  deg_Gate34: Gate34 => ; k_deg_Gate34*Gate34;
  deg_Crosstalk_21_155: Crosstalk_21_155 => ; k_deg_Int21*Crosstalk_21_155;
  deg_Crosstalk_21_34: Crosstalk_21_34 => ; k_deg_Int21*Crosstalk_21_34;
  deg_Crosstalk_155_21: Crosstalk_155_21 => ; k_deg_Int21*Crosstalk_155_21;
  deg_Crosstalk_155_34: Crosstalk_155_34 => ; k_deg_Int21*Crosstalk_155_34;
  deg_Crosstalk_34_21: Crosstalk_34_21 => ; k_deg_Int21*Crosstalk_34_21;
  deg_Crosstalk_34_155: Crosstalk_34_155 => ; k_deg_Int21*Crosstalk_34_155;
end
